*Heading
** Job name: taper-slide Model name: Model-1
** Generated by: Abaqus/CAE 6.14-1
*Preprint, echo=NO, model=NO, history=NO, contact=NO
**
** PARTS
**
*Part, name=piston
*Node
      1,           0.,           0.
      2,   1.98452437,           0.
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*Element, type=CAX6M
  1,    1,    2,   23,  442,  443,  444
  2,   23,   22,    1,  445,  446,  444
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*Nset, nset=piston, generate
    1,  1681,     1
*Elset, elset=piston, generate
   1,  800,    1
** Section: piston
*Solid Section, elset=piston, material=ABS
,
*End Part
**
*Part, name=tube
*Node
      1,          20.,         -45.
      2,          20.,         -40.
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*Element, type=CAX6M
 1,    1,   12,  302, 1292, 1293, 1294
 2,  302,   25,    1, 1295, 1296, 1294
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*Nset, nset=tube, generate
    1,  4877,     1
*Elset, elset=tube, generate
    1,  2296,     1
** Section: tube
*Solid Section, elset=tube, material=steel
,
*End Part
**
**
** ASSEMBLY
**
*Assembly, name=Assembly
**
*Instance, name=piston-1, part=piston
*End Instance
**
*Instance, name=tube-1, part=tube
*End Instance
**
*Nset, nset=piston, instance=piston-1, generate
    1,  1681,     1
*Elset, elset=piston, instance=piston-1, generate
   1,  800,    1
*Nset, nset=piston-centre, instance=piston-1
    1,   22,   43,   64,   85,  106
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*Elset, elset=piston-centre, instance=piston-1, generate
   2,  762,   40
*Nset, nset=tube-centre, instance=tube-1
    3,    4,    7,    8,   19,   37
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*Elset, elset=tube-centre, instance=tube-1
  26,  28,  84,  86,  88,  90,  92,  94,  96,  98, 100
*Nset, nset=tube-ends, instance=tube-1
    1,    4,    6,    7,   11,   20
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*Elset, elset=tube-ends, instance=tube-1
   2,   6,  10,  14,  18,  22
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*Elset, elset=_inner-tube_S2, internal, instance=tube-1
  3,  7, 11, 15, 19, 23, 27, 30, 48, 66, 84
*Elset, elset=_inner-tube_S3, internal, instance=tube-1, generate
  875,  2279,    18
*Elset, elset=_inner-tube_S1, internal, instance=tube-1, generate
 118,  838,   18
*Surface, type=ELEMENT, name=inner-tube
_inner-tube_S2, S2
_inner-tube_S3, S3
_inner-tube_S1, S1
*Elset, elset=_outer-piston_S1, internal, instance=piston-1
   1,   3,   5,   7,   9,  11
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*Elset, elset=_outer-piston_S2, internal, instance=piston-1, generate
  39,  799,   40
*Surface, type=ELEMENT, name=outer-piston
_outer-piston_S1, S1
_outer-piston_S2, S2
*Elset, elset=_piston-back_S1, internal, instance=piston-1, generate
  1,  39,   2
*Surface, type=ELEMENT, name=piston-back
_piston-back_S1, S1
*Elset, elset=_piston-front_S1, internal, instance=piston-1, generate
 762,  800,    2
*Surface, type=ELEMENT, name=piston-front
_piston-front_S1, S1
*End Assembly
*Amplitude, name=piston-back
             0.,              0.,              1.,              1.
*Amplitude, name=piston-front
             0.,              0.,              1.,              1.
**
** MATERIALS
**
*Material, name=ABS
*Density
 1.05e-09,
*Elastic
22000., 0.35
*Plastic
1200.,0.
1200.,1.
*Material, name=steel
*Density
 8e-09,
*Elastic
200000., 0.3
**
** INTERACTION PROPERTIES
**
*Surface Interaction, name=sliding
1.,
*Friction, slip tolerance=0.005
 0.05,
*Surface Behavior, pressure-overclosure=HARD
**
** BOUNDARY CONDITIONS
**
** Name: fix-piston-centre Type: Displacement/Rotation
*Boundary
piston-centre, 1, 1
** Name: fix-tube-centre Type: Displacement/Rotation
*Boundary
tube-centre, 1, 1
** Name: fix-tube-ends Type: Displacement/Rotation
*Boundary
tube-ends, 2, 2
**
** PREDEFINED FIELDS
**
** Name: piston-initial-velocity   Type: Velocity
*Initial Conditions, type=VELOCITY
piston, 1, 0.
piston, 2, 3e+06
**
** INTERACTIONS
**
** Interaction: piston-tube-contact
*Contact Pair, interaction=sliding, type=SURFACE TO SURFACE
outer-piston, inner-tube
** ----------------------------------------------------------------
**
** STEP: taper-slide
**
*Step, name=taper-slide, nlgeom=YES, inc=10000000
*Dynamic
1e-08,1.,1e-10
**
** LOADS
**
** Name: piston-back-pressure   Type: Pressure
*Dsload, amplitude=piston-back
piston-back, P, 0.2
** Name: piston-front-pressure   Type: Pressure
*Dsload, amplitude=piston-front
piston-front, P, 0.1
**
** OUTPUT REQUESTS
**
*Restart, write, frequency=0
**
** FIELD OUTPUT: F-Output-1
**
*Output, field, frequency=1
*Node Output
A, U, V
*Element Output, directions=YES
LE, PE, PEEQ, PEMAG, S
*Contact Output
CDISP, CSTRESS
**
** HISTORY OUTPUT: H-Output-1
**
*Output, history, frequency=1
*Energy Output
ALLPD, ALLSE, ETOTAL
*Contact Output
CFN1, CFN2, CFN3, CFNM, CFS1, CFS2, CFS3, CFSM, CFT1, CFT2, CFT3, CFTM
*End Step
