*Heading
** Job name: transition-slide-quasi Model name: taper-slide-quasistatic
** Generated by: Abaqus/CAE 6.14-1
*Preprint, echo=NO, model=NO, history=NO, contact=NO
**
** PARTS
**
*Part, name=cap
*Node
      1,          25.,          73.
      2,          23.,          73.
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*Element, type=CAX6M
 1,   1,   2,  11, 145, 146, 147
 2,  11,  32,   1, 148, 149, 147
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*Nset, nset=cap, generate
   1,  521,    1
*Elset, elset=cap, generate
   1,  234,    1
*Nset, nset=cap-centre
 7,
*Elset, elset=_piston-contact_S1, internal
 24,
*Elset, elset=_piston-contact_S2, internal
  38,  61,  62,  63,  64,  71,  84, 141, 143, 147, 149, 203
*Surface, type=ELEMENT, name=piston-contact
_piston-contact_S1, S1
_piston-contact_S2, S2
*Elset, elset=_transition-and-pump-contact_S2, internal, generate
  2,  24,   2
*Elset, elset=_transition-and-pump-contact_S1, internal
  26,  28,  30,  32,  34,  36, 233
*Elset, elset=_transition-and-pump-contact_S3, internal
 234,
*Surface, type=ELEMENT, name=transition-and-pump-contact
_transition-and-pump-contact_S2, S2
_transition-and-pump-contact_S1, S1
_transition-and-pump-contact_S3, S3
** Section: hdpe
*Solid Section, elset=cap, material=HDPE
,
*End Part
**
*Part, name=piston
*Node
      1,          25.,          55.
      2,          25.,         125.
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*Element, type=CAX6M
  1, 157,  93, 148, 209, 210, 211
  2, 204, 134, 131, 212, 213, 214
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*Nset, nset=piston, generate
   1,  754,    1
*Elset, elset=piston, generate
   1,  339,    1
*Elset, elset=_end-contact_S2, internal
  15,  25,  27,  34, 120, 150, 182, 183, 184, 186, 187
*Elset, elset=_end-contact_S3, internal
 27,
*Surface, type=ELEMENT, name=end-contact
_end-contact_S2, S2
_end-contact_S3, S3
*Elset, elset=_pump-contact_S1, internal
 25,
*Elset, elset=_pump-contact_S2, internal
  73, 104, 105, 106, 107, 108
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*Surface, type=ELEMENT, name=pump-contact
_pump-contact_S1, S1
_pump-contact_S2, S2
** Section: aluminium
*Solid Section, elset=piston, material=aluminium
,
*End Part
**
*Part, name=pump-tube
*Node
      1,          35.,         750.
      2,          25.,         750.
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*Element, type=CAX6M
   1,    1,    7,  411,  809,  810,  811
   2,  411,  384,    1,  812,  813,  811
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*Nset, nset=tube, generate
    1,  2821,     1
*Elset, elset=tube, generate
    1,  1206,     1
*Elset, elset=_transition-tie_S2, internal, generate
 1133,  1205,     6
*Elset, elset=_transition-tie_S1, internal, generate
 1202,  1206,     2
*Surface, type=ELEMENT, name=transition-tie
_transition-tie_S2, S2
_transition-tie_S1, S1
*Elset, elset=_piston-contact_S2, internal, generate
 1130,  1202,     6
*Surface, type=ELEMENT, name=piston-contact
_piston-contact_S2, S2
** Section: steel
*Solid Section, elset=tube, material=mild-steel
,
*End Part
**
*Part, name=transition-piece
*Node
      1,           6.,         102.
      2,          40.,         102.
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*Element, type=CAX6M
 1,   1,  10,  85, 191, 192, 193
 2,  85,  33,   1, 194, 195, 193
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*Nset, nset=transition-piece, generate
   1,  681,    1
*Elset, elset=transition-piece, generate
   1,  302,    1
*Elset, elset=_tube-tie_S2, internal
  91,  93,  95,  97,  99, 101, 103, 105, 107, 109, 111, 113, 115, 152, 212, 213
*Surface, type=ELEMENT, name=tube-tie
_tube-tie_S2, S2
*Elset, elset=_end-contact_S2, internal
 119, 123, 125, 132, 134, 160, 164, 168, 181, 190, 193, 199, 205, 211
*Surface, type=ELEMENT, name=end-contact
_end-contact_S2, S2
** Section: steel
*Solid Section, elset=transition-piece, material=mild-steel
,
*End Part
**
**
** ASSEMBLY
**
*Assembly, name=Assembly
**
*Instance, name=pump-tube-1, part=pump-tube
          0.,        -800.,           0.
*End Instance
**
*Instance, name=transition-piece-1, part=transition-piece
          0.,         -50.,           0.
*End Instance
**
*Instance, name=cap-1, part=cap
          0.,         -75.,           0.
*End Instance
**
*Instance, name=piston-1, part=piston
          0.,        -175.,           0.
*End Instance
**
*Nset, nset=all, instance=pump-tube-1, generate
    1,  2821,     1
*Nset, nset=all, instance=transition-piece-1, generate
   1,  681,    1
*Nset, nset=all, instance=piston-1, generate
   1,  754,    1
*Nset, nset=all, instance=cap-1, generate
   1,  521,    1
*Elset, elset=all, instance=pump-tube-1, generate
    1,  1206,     1
*Elset, elset=all, instance=transition-piece-1, generate
   1,  302,    1
*Elset, elset=all, instance=piston-1, generate
   1,  339,    1
*Elset, elset=all, instance=cap-1, generate
   1,  234,    1
*Nset, nset=fixed, instance=pump-tube-1
    3,    4,  196,  197, 2684, 2688, 2691
*Nset, nset=fixed, instance=transition-piece-1
   2,   3,   4,  18,  19,  20
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*Elset, elset=fixed, instance=pump-tube-1, generate
 1124,  1128,     2
*Elset, elset=fixed, instance=transition-piece-1
 17, 35, 53, 71, 74, 76, 78, 80, 82, 84, 86, 88, 89, 90
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*Nset, nset=piston-bottom, instance=piston-1
   8,   9,  60,  61,  62, 369, 370, 375, 421
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*Nset, nset=piston-centre-actual, instance=cap-1
   5,   7,   8,  43,  44,  45
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*Nset, nset=piston-centre-actual, instance=piston-1
   5,   6,  37,  38,  39,  40
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*Elset, elset=piston-centre-actual, instance=cap-1
  26,  39,  45,  55,  62,  92
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*Elset, elset=piston-centre-actual, instance=piston-1
  34, 152, 154, 155, 156, 157, 158, 161, 163, 164, 166, 170, 172, 174, 176, 180
*Elset, elset=_cap-front_S1, internal, instance=cap-1
  26,  28,  30,  32,  34,  36, 233
*Elset, elset=_cap-front_S3, internal, instance=cap-1
 234,
*Surface, type=ELEMENT, name=cap-front
_cap-front_S1, S1
_cap-front_S3, S3
*Elset, elset=_piston-back_S2, internal, instance=piston-1
   4,   7,  49,  57,  58,  60
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*Elset, elset=_piston-back_S1, internal, instance=piston-1
 57,
*Elset, elset=_piston-back_S3, internal, instance=piston-1
 60,
*Surface, type=ELEMENT, name=piston-back
_piston-back_S2, S2
_piston-back_S1, S1
_piston-back_S3, S3
*Elset, elset=_tube-inner_S2, internal, instance=pump-tube-1
    5,   11,   17,   23,   29,   35
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*Surface, type=ELEMENT, name=tube-inner
_tube-inner_S2, S2
** Constraint: cap-to-piston
*Tie, name=cap-to-piston, adjust=yes
cap-1.piston-contact, piston-1.end-contact
** Constraint: transition-fitting
*Tie, name=transition-fitting, adjust=yes
transition-piece-1.tube-tie, pump-tube-1.transition-tie
*End Assembly
*Amplitude, name=front-pressure
             0.,              1.,              1.,              1.
*Amplitude, name=periodic-increasing
             0.,              0., 0.001001001001001, 1.8585501257283e-05, 0.002002002002002, 7.45106331428232e-05, 0.003003003003003, 0.000168021366346208
0.004004004004004, 0.000299354293656476, 0.005005005005005, 0.000468736528675381, 0.00600600600600601, 0.000676385606906099, 0.00700700700700701, 0.000922509389252055
0.00800800800800801, 0.00120730596796059, 0.00900900900900901, 0.00153096357504519, 0.01001001001001, 0.00189366049321925, 0.011011011011011, 0.00229556496937434
0.012012012012012, 0.00273683513063434, 0.013013013013013, 0.0032176189030171, 0.014014014014014, 0.00373805393273392, 0.015015015015015, 0.00429826751015681
0.016016016016016, 0.00489837649648276, 0.017017017017017, 0.00553848725312333, 0.018018018018018, 0.00621869557384763, 0.019019019019019, 0.0069390866197054
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0.996996996996997, 0.997342892927353, 0.997997997997998, 0.998351731087395, 0.998998998998999, 0.999237535298284,              1.,              1.
*Amplitude, name=pressure
             0.,              1.,              1.,              1.
**
** MATERIALS
**
*Material, name=HDPE
*Density
 9.5e-10,
*Elastic
1630., 0.46
*Plastic
 7.35977,         0.
 11.8673, 0.00167295
 15.1777, 0.00379229
 18.0656, 0.00741575
 20.6016,  0.0122514
 23.0674,  0.0191115
 24.8289,  0.0261684
 26.2737,  0.0349104
 27.4722,  0.0452928
 28.3183,  0.0539174
*Material, name=HDPE-Copy
*Deformation Plasticity
1630.,  0.46,  14.6,  4.26, 0.342
*Density
 9.5e-10,
*Material, name=aluminium
*Density
 2.7e-09,
*Elastic
68300., 0.34
*Material, name=mild-steel
*Density
 8e-09,
*Elastic
200000., 0.33
**
** INTERACTION PROPERTIES
**
*Surface Interaction, name=HDPE-on-steel
1.,
*Friction, slip tolerance=0.005
 0.25,
*Surface Behavior, pressure-overclosure=HARD
*Surface Interaction, name=aluminium-on-steel
1.,
*Friction, slip tolerance=0.005
 0.5,
*Surface Behavior, pressure-overclosure=HARD
*Time Points, name=measure-values, GENERATE
0., 1., 0.01
**
** BOUNDARY CONDITIONS
**
** Name: fix Type: Displacement/Rotation
*Boundary
fixed, 1, 1
fixed, 2, 2
** Name: piston-centre Type: Displacement/Rotation
*Boundary
piston-centre-actual, 1, 1
**
** INTERACTIONS
**
** Interaction: cap-on-tube
*Contact Pair, interaction=HDPE-on-steel, type=SURFACE TO SURFACE
cap-1.transition-and-pump-contact, pump-tube-1.piston-contact
** Interaction: cap-transition
*Contact Pair, interaction=HDPE-on-steel, type=SURFACE TO SURFACE
cap-1.transition-and-pump-contact, transition-piece-1.end-contact
** Interaction: piston-on-tube
*Contact Pair, interaction=aluminium-on-steel, type=SURFACE TO SURFACE
piston-1.pump-contact, tube-inner
** ----------------------------------------------------------------
**
** STEP: taper-slide
**
*Step, name=taper-slide, nlgeom=YES, inc=1000000
*Static
0.01, 1., 1e-08, 0.01
**
** BOUNDARY CONDITIONS
**
** Name: cycle Type: Displacement/Rotation
*Boundary, amplitude=periodic-increasing
piston-bottom, 2, 2, 10.
**
** OUTPUT REQUESTS
**
*Restart, write, frequency=0
**
** FIELD OUTPUT: F-Output-1
**
*Output, field, variable=PRESELECT
**
** FIELD OUTPUT:  from REMESHING RULE: RemeshingRule-1
**
*Output, field, frequency=99999
*Element Output, elset=all, directions=YES
ENDENERI, ENDEN, ELEN, EVOL
**
** HISTORY OUTPUT: H-Output-1
**
*Output, history, time points=measure-values
*Energy Output
ALLCD, ALLDMD, ALLFD, ALLJD, ALLPD, ALLSD, ALLVD
*Contact Output
CFT2,
**
** HISTORY OUTPUT: H-Output-2
**
*Node Output, nset=cap-1.cap-centre
U2, V2
*End Step
